// COMSOL Multiphysics 6.2.0.290 model "argon_gec_ccp.mph"
// GEC CCP Reactor, Argon Chemistry
// This model investigates the GEC (Gaseous Electronics Conference) reference cell in two dimensions using the Plasma, Time Periodic interface. The cell is driven with a fixed power, and results show good agreement with those published in the literature.
// Outline of the model tree

Parameters
  L = 2.54[cm]  // Discharge gap
  R1 = 5.38[cm]  // Inner radius
  R2 = 10.16[cm]  // Outer radius
  Hd = 10.16[cm]  // Chamber height
  dThick = 3[mm]  // Dielectric thickness
  f0 = 13.56[MHz]  // Frequency
  P0 = 1[W]  // Power

Selections
  sel1: Explicit "Walls" on boundaries 2-5
  sel2: Explicit "Driven Electrode" on boundaries 2
  sel3: Explicit "Dielectric Contact" on boundaries 4
  sel4: Explicit "Grounded Walls" on boundaries 3, 5

Geometry
  geom1 "Geometry 1" (2D axisymmetric, length unit m)
    r1: Rectangle | size = {R1, L}
    r2: Rectangle (disabled) | pos = {R1, -Hd/2+L/2}; size = {R2-R1, Hd}
    pt1: Point | p = {R1-dThick, }
    pt2: Point | p = {R1-dThick, L}
    pt3: Point | p = {R2, 0}
    pt4: Point | p = {R2, L}
    ls1: LineSegment | vertex1 = pt2(1) points 1; vertex2 = pt1(1) points 1
    fin: Finalize "Form Union"
    mce1: MeshControlEdges | input = fin(1) boundaries 4, 7; includevtx = off

Physics
  ptp: ColdPlasmaTimePeriodic "Plasma, Time Periodic" on all domains
    dependent variable Ne_per
    ExtraDimensionSettings.Period_xd = 1/f0
    ExtraDimensionSettings.Nelemptp = 30
    ExtraDimensionSettings.HeavySpeciesSelection = BaseGeometry
    xsec1: CrossSectionImport | Filepath = Ar_xsecs_reduced.txt
    eir1: ElectronImpactReaction "1: e+Ar=>e+Ar" on all domains
      rType = irrev
      Species = {e, Ar}
      fwdSpecies = {e, Ar}
      revSpecies = {e, Ar}
      rIsValid = 1
      rSequenceNo = 1
      fwdArray = {-1, -1, 0, 0}
      revArray = {1, 1, 0, 0}
      formula = e+Ar=>e+Ar
      type = Elastic
      mratio = 0.136E-04
      SpecifyReactionUsing = UseCrossSectionData
      eedf = FromPhysicsInterfaceProperty
      g = 1
      xdata = {0.0, 0.001, 0.002, 0.003, 0.005, 0.007, 0.0085, 0.01, 0.015, 0.02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}
      ydata = {7.5E-20, 7.5E-20, 7.1E-20, 6.7E-20, 6.1E-20, 5.4E-20, 5.05E-20, 4.6E-20, 3.75E-20, 3.25E-20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}
      RateConstantForm = UseRate
      xscale = 1
      yscale = 1
      useArrhenius = 1
      Af = 1
      Ar = 1
      kf = 1
      kr = 1
    eir2: ElectronImpactReaction "2: e+Ar=>e+Ars" on all domains
      rType = irrev
      Species = {e, Ar, Ars}
      fwdSpecies = {e, Ar}
      revSpecies = {e, Ars}
      rIsValid = 1
      rSequenceNo = 2
      fwdArray = {-1, -1, 0, 0}
      revArray = {1, 0, 1, 0}
      stoichArray = {0, -1, 1, 0}
      formula = e+Ar=>e+Ars
      type = Excitation
      de = 11.50
      SpecifyReactionUsing = UseCrossSectionData
      eedf = FromPhysicsInterfaceProperty
      g = 1
      xdata = {0.0, 11.5, 12.7, 13.7, 14.7, 15.9, 16.5, 17.5, 18.5, 19.9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}
      ydata = {0.0, 0.0, 7.0E-22, 1.41E-21, 2.28E-21, 3.8E-21, 4.8E-21, 6.1E-21, 7.5E-21, 9.2E-21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}
      RateConstantForm = UseRate
      gw = 12
      xscale = 1
      yscale = 1
      useArrhenius = 1
      Af = 1
      Ar = 1
      kf = 1
      kr = 1
    eir3: ElectronImpactReaction "3: e+Ar=>2e+Ar+" on all domains
      rType = irrev
      Species = {e, Ar, Ar_1p}
      fwdSpecies = {e, Ar}
      revSpecies = {e, Ar+}
      rIsValid = 1
      rSequenceNo = 3
      fwdArray = {-1, -1, 0, 0}
      revArray = {2, 0, 0, 1}
      stoichArray = {1, -1, 0, 1}
      formula = e+Ar=>2e+Ar+
      type = Ionization
      de = 15.80
      SpecifyReactionUsing = UseCrossSectionData
      eedf = FromPhysicsInterfaceProperty
      g = 1
      xdata = {0.0, 15.8, 16.0, 17.0, 18.0, 20.0, 22.0, 23.75, 25.0, 26.5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}
      ydata = {0.0, 0.0, 2.02E-22, 1.34E-21, 2.94E-21, 6.3E-21, 9.3E-21, 1.15E-20, 1.3E-20, 1.45E-20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}
      RateConstantForm = UseRate
      xscale = 1
      yscale = 1
      useArrhenius = 1
      Af = 1
      Ar = 1
      kf = 1
      kr = 1
    e: Species "Species: e" on all domains
      specName = e
      specLabel = e
      sType = electron
      sisDef = 1
      PresetSpeciesData = UserDefined
      M = 0.04[kg/mol]
      sigma = 3.3[angstrom]
      epsilonkb = 93.3[K]
      mu = 0.000[C*m]
      Dfs = 1E-4[m^2/s]
      x0 = 1E-8
      n0 = 1E13[1/m^3]
      Tlo = 300[K]
      Tmid = 1000[K]
      Thi = 5000[K]
      MobilityDiffusivitySpecification = ComputeMobilityAndDiffusivity
      IonTemperatureSpecification = UseGasForIonTemperature
      Tion = 300[K]
      MobilitySpecification = SpecifyConstantMobility
      um = 20[m^2/(V*s)]
      alphap = 1.64[angstrom^3]
      sighf = 7e-19[m^2]
      MobilityEFieldSpecification = EfieldVMobilityData
      constraintOptions = pointwiseConstraints
      constraintType = symmetricConstraint
      constraintMethod = elemental
    Ar: Species "Species: Ar" on all domains | FromMassConstraint = 1; PresetSpeciesData = Ar
    Ars: Species "Species: Ars" (disabled) on all domains
      specName = Ars
      specLabel = Ars
      sType = neutral
      sisDef = 1
      PresetSpeciesData = UserDefined
      M = 0.04[kg/mol]
      sigma = 3.3[angstrom]
      epsilonkb = 93.3[K]
      mu = 0.000[C*m]
      Dfs = 1E-4[m^2/s]
      x0 = 1E-8
      n0 = 1E13[1/m^3]
      Tlo = 300[K]
      Tmid = 1000[K]
      Thi = 5000[K]
      MobilityDiffusivitySpecification = ComputeMobilityAndDiffusivity
      IonTemperatureSpecification = UseGasForIonTemperature
      Tion = 300[K]
      MobilitySpecification = SpecifyConstantMobility
      um = 20[m^2/(V*s)]
      alphap = 1.64[angstrom^3]
      sighf = 7e-19[m^2]
      MobilityEFieldSpecification = EfieldVMobilityData
      constraintOptions = pointwiseConstraints
      constraintType = symmetricConstraint
      constraintMethod = elemental
    Ar_1p: Species "Species: Ar+" on all domains
      InitIon = 1
      PresetSpeciesData = Ar
      MobilityDiffusivitySpecification = SpecifyMobilityComputeDiffusivity
      IonTemperatureSpecification = LocalFieldApproximation
      MobilitySpecification = ArIoninAr
    sr1: SurfaceReaction "1: Ar+=>Ar" on selection sel1 | formula = Ar+=>Ar; gammaf = 0
    pes1: PlasmaEsModel "Plasma Model 1" (default)
      T = 300[K]
      pA = 0.1[torr]
      mue = 3E5[cm^2/(V*s)]/0.1
      SpecifyElectronDensityAndEnergy = SpecifyMueOnly
    init1: InitialValues (default)
    ins1: Insulation (default)
    axi1: AxialSymmetry (default)
    zc1: ZeroCharge (default)
    wall1: WallDriftDiffusion "Wall 1" on selection sel1 | re = 5/11
    mct1: MetalContact on selection sel2 | Prf = P0; fp = f0; CompBias = 1
    dct1: DielectricContact (disabled) on selection sel3
    gnd1: Ground on selection sel4

Mesh
  mesh1 "Mesh 1"
    size: MeshSizeDefault | hmax = 0.00681; hmin = 3.05E-5; hcurve = 0.3; hgrad = 1.3
    map1: Map "Mapped 1" on remaining entities | smoothcontrol = off
      dis1: Distribution on boundaries 4, 5 | numelem = 4
      dis2: Distribution on boundaries 2, 3 | type = predefined; elemcount = 20; elemratio = 5
      dis3: Distribution on no boundaries | type = predefined; elemcount = 15; elemratio = 10; symmetric = on
      dis4: Distribution on no boundaries | type = predefined; elemcount = 15; elemratio = 8; symmetric = on
      dis5: Distribution on boundaries 1, 6, 7 | type = predefined; elemcount = 25; elemratio = 3; symmetric = on

Studies
  std1 "Time Periodic Study"
    tper: TimePeriodic
  std2 "Time Periodic to Time Dependent"
    tptd: TimePeriodicToTimeDependent
      tlist = range(0,(1/f0-0)/50,1/f0)
      initialtime = 0
      usesol = on
      notsolmethod = sol
      notstudy = std1

Solver configurations
  sol1 "Solution 1" (study std1)
    v1: Variables "Dependent Variables 1"
      comp1_En_per: Field "Electron energy solution variable (comp1.En_per)" | scalemethod = manual; scaleval = 35
      comp1_Ne_per: Field "Electron solution variable (comp1.Ne_per)" | scalemethod = manual; scaleval = 35
      comp1_ptp_Ar_1p_W_per: Field "Log mass fraction (comp1.ptp.Ar_1p.W_per)" | scalemethod = manual; scaleval = 10
      comp1_ptp_mct1_Jdep_per: Field "Total current density (comp1.ptp.mct1.Jdep_per)"
        scalemethod = manual
        scaleval = 10
      comp1_V_per: Field "Electric potential (comp1.V_per)" | scalemethod = manual; scaleval = 500
      comp1_ptp_mct1_Vdcb_per: State "DC bias voltage (comp1.ptp.mct1.Vdcb_per)" | scalemethod = manual; scaleval = 100
      comp1_ptp_mct1_Va_per: State "Voltage amplitude (comp1.ptp.mct1.Va_per)" | scalemethod = manual; scaleval = 500
    s1: Stationary "Stationary Solver 1"
      fc1: FullyCoupled
        linsolver = d1
        initstep = 1.0E-4
        minstep = 1.0E-6
        rstep = 5
        rstepabs = 0.05
        minsteprecovery = 0.01
        updweightsauto = wthresh
        updweightsdampval = 0.1
        maxiter = 200
      d1: Direct "Suggested Direct Solver (ptp)" | linsolver = pardiso
  sol2 "Solution 2" (study std2)
    v1: Variables "Dependent Variables 1"
    t1: Time "Time-Dependent Solver 1" | tlist = range(0,(1/f0-0)/50,1/f0); tstepsbdf = intermediate
      dDef: Direct
      fc1: FullyCoupled | linsolver = dDef

Datasets
  dset1: Solution | solution = sol1
  dset2: Solution | solution = sol1
  cln1: CutLine2D | data = dset1; genpoints = {{0, 0}, {0, 2[cm]}}; snapping = boundary
  cln2: CutLine2D | data = dset1; genpoints = {{0, L/2}, {R2, L/2}}
  dset3: Solution | solution = sol2

Derived values
  gev1: EvalGlobal "Global Evaluation 1"
    data = dset1
    table = tbl1
    expr = {ptp.mct1.Va_per, ptp.mct1.Vdcb_per}
    unit = {V, V}
    descr = {Voltage amplitude, DC bias voltage}

Tables
  tbl1: Table
    // Global Evaluation 1
    Voltage amplitude (V) | DC bias voltage (V)
    107.568 | -75.8465

Plots
  pg1: PlotGroup2D "Electron Density, Period Averaged (ptp)" | data = dset1
    surf1: Surface | expr = ptp.neav
  pg2: PlotGroup2D "Electron Temperature, Period Averaged (ptp)" | data = dset1
    surf1: Surface | expr = ptp.Teav
  pg3: PlotGroup2D "Electric Potential, Period Averaged (ptp)" | data = dset1
    surf1: Surface | expr = ptp.Vav
  pg4: PlotGroup2D "Capacitive Power Deposition, Period Averaged (ptp)" | data = dset1
    surf1: Surface | expr = ptp.Pcap_av
  pg5: PlotGroup1D "Current and Voltage, Metal Contact 1 (ptp)" | data = dset2; xlabel = Period fraction
    lngr1: LineGraph on all domains | expr = ptp.mct1.V; xdata = expr; xdataexpr = x1_ptp; legends = V
    lngr2: LineGraph on all domains | expr = ptp.mct1.I; xdata = expr; xdataexpr = x1_ptp; legends = I
  pg6: PlotGroup2D "Ionization Source, Period-Averaged" | data = dset1
    surf1: Surface | expr = ptp.Re_av; unit = 1/(m^3*s); descr = Rate expression, period averaged
  pg7: PlotGroup1D "On Axis Electron Density" | data = cln1
    lngr1: LineGraph | expr = ptp.neav
  pg8: PlotGroup1D "Radial Electron Density" | data = cln2
    lngr1: LineGraph | expr = ptp.neav
  pg9: PlotGroup2D "Electron Density (ptp)" | data = dset3
    surf1: Surface | expr = ptp.ne
  pg10: PlotGroup2D "Electron Temperature (ptp)" | data = dset3
    surf1: Surface | expr = ptp.Te
  pg11: PlotGroup2D "Electric Potential (ptp)" | data = dset3
    surf1: Surface | expr = V
  pg12: PlotGroup1D "Current and Voltage, Metal Contact 1 (ptp) 1" | data = dset3
    glob1: Global | expr = ptp.mct1.V; unit = V; descr = Electric potential; legends = V
    glob2: Global | expr = ptp.mct1.I; unit = A; legends = I
  pg13: PlotGroup2D "2D Plot Group 13" | data = dset1
    surf1: Surface | expr = ptp.Jelr
  pg14: PlotGroup2D "eletcron currnet denisty" on all domains | data = dset1
    surf1: Surface | data = dset3; expr = ptp.Jelr; descr = Electron current density, r-component
  pg15: PlotGroup2D "eletcron currnet denisty 1" on all domains | data = dset1
    surf1: Surface | data = dset3; expr = ptp.Jelz; descr = Electron current density, z-component
  pg16: PlotGroup2D "eletcron currnet denisty 1.1" on all domains | data = dset1
    surf1: Surface | data = dset3; expr = ptp.normD; descr = Electric displacement field norm

Exports
  anim1: Animation | target = player
  data1: Data
    data = dset1
    expr = {ptp.neav, ptp.Teav, ptp.Vav, ptp.Re_av, ptp.Pcap_av, , }
    filename = C:\Users\anush\OneDrive\Desktop\iGEM\Multiphysics\applications\Plasma_Module\Capacitively_Coupled_Plasmas\newgeomtery.txt